<?xml version="1.0"?>

<!-- Copyright (c) 2017 Joshua Davidson (it0uchpods) -->

<piston_engine name="lycoming-O-320-D3G">
    <minmp unit="INHG">         8.30 </minmp>
    <maxmp unit="INHG">        28.50 </maxmp>
    <displacement unit="IN3"> 319.82 </displacement>
    <maxhp>                   180.00 </maxhp>
    <cycles>                    4.00 </cycles>
    <idlerpm>                 668.00 </idlerpm>
    <maxrpm>                 2477.00 </maxrpm>
    <maxthrottle>               0.90 </maxthrottle>
    <minthrottle>               0.00 </minthrottle>
    <sparkfaildrop>             0.10 </sparkfaildrop>
	<bsfc unit="LBS/HP*HR">     0.31 </bsfc>
	<volumetric-efficiency>     0.68 </volumetric-efficiency>
</piston_engine>
